// SBML level 3 version 1

model main()
  // model units - substance: mole, time: second, volume: litre, area: square_metre, length: metre, extent: mole

  // Compartments:
  compartment default = 1e-6;

  // Species:
  species protein_RNAP in default = 5;
  species protein_Ribo in default = 10;
  species protein_RNAase in default = 2.5;
  species protein_GFP in default = 0;
  species dna_G1 in default = 10;
  species rna_T1 in default = 0;
  species complex_protein_RNAase_rna_T1 in default = 0;
  species complex_protein_Ribo_rna_T1 in default = 0;
  species complex_dna_G1_protein_RNAP in default = 0;

  // Reactions:
  r0: dna_G1 + protein_RNAP => complex_dna_G1_protein_RNAP; r0_k*dna_G1*protein_RNAP;
    r0_k = 100;
  r0_1: complex_dna_G1_protein_RNAP => dna_G1 + protein_RNAP; r0_1_k*complex_dna_G1_protein_RNAP;
    r0_1_k = 10;
  r2: complex_dna_G1_protein_RNAP => dna_G1 + rna_T1 + protein_RNAP; r2_k*complex_dna_G1_protein_RNAP;
    r2_k = 3;
  r4: rna_T1 + protein_Ribo => complex_protein_Ribo_rna_T1; r4_k*rna_T1*protein_Ribo;
    r4_k = 100;
  r4_1: complex_protein_Ribo_rna_T1 => rna_T1 + protein_Ribo; r4_1_k*complex_protein_Ribo_rna_T1;
    r4_1_k = 10;
  r6: complex_protein_Ribo_rna_T1 => rna_T1 + protein_GFP + protein_Ribo; r6_k*complex_protein_Ribo_rna_T1;
    r6_k = 2;
  r8: rna_T1 + protein_RNAase => complex_protein_RNAase_rna_T1; r8_k*rna_T1*protein_RNAase;
    r8_k = 100;
  r8_1: complex_protein_RNAase_rna_T1 => rna_T1 + protein_RNAase; r8_1_k*complex_protein_RNAase_rna_T1;
    r8_1_k = 10;
  r10: complex_protein_RNAase_rna_T1 => protein_RNAase; r10_k*complex_protein_RNAase_rna_T1;
    r10_k = 1;

  // Unit definitions:
  unit square_metre = metre^2;
end
